<Lems>

    <!--

Parameters and setting used to generate this network:

    Data reader:                    UpdatedSpreadsheetDataReader2
    c302 version:                   0.7.5
    PyOpenWorm version:             0.10.0.post0
    Cells:                          ['AVBL', 'AVBR', 'DB1', 'DB2', 'DB3', 'VD1', 'VD2', 'VD3', 'VB1', 'VB2', 'VB3', 'DD1', 'DD2', 'DD3']
    Cell stimulated:                []
    Connection:                     []
    Connection numbers overridden:  {'^.+-.+$': 1}
    Connection numbers scaled:      None
    Connection polarities override: {'^VB\\d+-VD\\d+$': 'inh', '^DB\\d+-DD\\d+$': 'inh'}
    Muscles:                        []

    Known BioParameters:
        BioParameter: AVBL_to_DB2_elec_syn_gbase = 0.001 nS (SRC: Add with param_overrides, certainty 0)
        BioParameter: AVBL_to_DB3_elec_syn_gbase = 0.001 nS (SRC: Add with param_overrides, certainty 0)
        BioParameter: AVBL_to_VB1_elec_syn_gbase = 0.001 nS (SRC: Add with param_overrides, certainty 0)
        BioParameter: AVBL_to_VB2_elec_syn_gbase = 0.001 nS (SRC: Add with param_overrides, certainty 0)
        BioParameter: AVBL_to_VB2_exc_syn_conductance = 0 nS (SRC: Add with param_overrides, certainty 0)
        BioParameter: AVBR_to_DB1_elec_syn_gbase = 0.001 nS (SRC: Add with param_overrides, certainty 0)
        BioParameter: AVBR_to_DB2_elec_syn_gbase = 0.001 nS (SRC: Add with param_overrides, certainty 0)
        BioParameter: AVBR_to_DB3_elec_syn_gbase = 0.001 nS (SRC: Add with param_overrides, certainty 0)
        BioParameter: AVBR_to_DB4_exc_syn_conductance = 0 nS (SRC: Add with param_overrides, certainty 0)
        BioParameter: AVBR_to_MVL16_exc_syn_conductance = 0 nS (SRC: Add with param_overrides, certainty 0)
        BioParameter: AVBR_to_VB2_elec_syn_gbase = 0.001 nS (SRC: Add with param_overrides, certainty 0)
        BioParameter: AVBR_to_VB3_elec_syn_gbase = 0.001 nS (SRC: Add with param_overrides, certainty 0)
        BioParameter: AVBR_to_VD3_exc_syn_conductance = 0 nS (SRC: Add with param_overrides, certainty 0)
        BioParameter: DB1_to_AVBR_elec_syn_gbase = 0.001 nS (SRC: Add with param_overrides, certainty 0)
        BioParameter: DB1_to_DB2_elec_syn_gbase = 0.001 nS (SRC: Set with param_overrides, certainty 0)
        BioParameter: DB1_to_DB2_exc_syn_ad = 18 per_s (SRC: Add with param_overrides, certainty 0)
        BioParameter: DB1_to_DB2_exc_syn_ar = 0.08 per_s (SRC: Add with param_overrides, certainty 0)
        BioParameter: DB1_to_DB2_exc_syn_beta = 0.21 per_mV (SRC: Add with param_overrides, certainty 0)
        BioParameter: DB1_to_DB2_exc_syn_conductance = 20 nS (SRC: Add with param_overrides, certainty 0)
        BioParameter: DB1_to_DB2_exc_syn_erev = 10 mV (SRC: Add with param_overrides, certainty 0)
        BioParameter: DB1_to_DB2_exc_syn_vth = -10 mV (SRC: Add with param_overrides, certainty 0)
        BioParameter: DB1_to_VB3_elec_syn_gbase = 0 nS (SRC: Add with param_overrides, certainty 0)
        BioParameter: DB2_to_AVBL_elec_syn_gbase = 0.001 nS (SRC: Add with param_overrides, certainty 0)
        BioParameter: DB2_to_AVBR_elec_syn_gbase = 0.001 nS (SRC: Add with param_overrides, certainty 0)
        BioParameter: DB2_to_DB1_elec_syn_gbase = 0.001 nS (SRC: Set with param_overrides, certainty 0)
        BioParameter: DB2_to_DB3_elec_syn_gbase = 0.001 nS (SRC: Set with param_overrides, certainty 0)
        BioParameter: DB2_to_DB3_exc_syn_ad = 18 per_s (SRC: Add with param_overrides, certainty 0)
        BioParameter: DB2_to_DB3_exc_syn_ar = 0.08 per_s (SRC: Add with param_overrides, certainty 0)
        BioParameter: DB2_to_DB3_exc_syn_beta = 0.21 per_mV (SRC: Add with param_overrides, certainty 0)
        BioParameter: DB2_to_DB3_exc_syn_conductance = 20 nS (SRC: Add with param_overrides, certainty 0)
        BioParameter: DB2_to_DB3_exc_syn_erev = 10 mV (SRC: Add with param_overrides, certainty 0)
        BioParameter: DB2_to_DB3_exc_syn_vth = -10 mV (SRC: Add with param_overrides, certainty 0)
        BioParameter: DB3_to_AVBL_elec_syn_gbase = 0.001 nS (SRC: Add with param_overrides, certainty 0)
        BioParameter: DB3_to_AVBR_elec_syn_gbase = 0.001 nS (SRC: Add with param_overrides, certainty 0)
        BioParameter: DB3_to_DB2_elec_syn_gbase = 0.001 nS (SRC: Set with param_overrides, certainty 0)
        BioParameter: DB3_to_DD3_elec_syn_gbase = 0 nS (SRC: Add with param_overrides, certainty 0)
        BioParameter: DD1_to_MVL08_elec_syn_gbase = 0 nS (SRC: Add with param_overrides, certainty 0)
        BioParameter: DD1_to_VB2_inh_syn_conductance = 0 nS (SRC: Add with param_overrides, certainty 0)
        BioParameter: DD3_to_DB3_elec_syn_gbase = 0 nS (SRC: Add with param_overrides, certainty 0)
        BioParameter: MDL09_to_VD2_elec_syn_gbase = 0 nS (SRC: Add with param_overrides, certainty 0)
        BioParameter: MVL08_to_DD1_elec_syn_gbase = 0 nS (SRC: Add with param_overrides, certainty 0)
        BioParameter: VB1_to_AVBL_elec_syn_gbase = 0.001 nS (SRC: Add with param_overrides, certainty 0)
        BioParameter: VB1_to_VB2_elec_syn_gbase = 0.001 nS (SRC: Set with param_overrides, certainty 0)
        BioParameter: VB1_to_VB2_exc_syn_ad = 73 per_s (SRC: Add with param_overrides, certainty 0)
        BioParameter: VB1_to_VB2_exc_syn_ar = 0.19 per_s (SRC: Add with param_overrides, certainty 0)
        BioParameter: VB1_to_VB2_exc_syn_beta = 2.81 per_mV (SRC: Add with param_overrides, certainty 0)
        BioParameter: VB1_to_VB2_exc_syn_conductance = 18 nS (SRC: Add with param_overrides, certainty 0)
        BioParameter: VB1_to_VB2_exc_syn_erev = 10 mV (SRC: Add with param_overrides, certainty 0)
        BioParameter: VB1_to_VB2_exc_syn_vth = -22 mV (SRC: Add with param_overrides, certainty 0)
        BioParameter: VB2_to_AVBL_elec_syn_gbase = 0.001 nS (SRC: Add with param_overrides, certainty 0)
        BioParameter: VB2_to_AVBR_elec_syn_gbase = 0.001 nS (SRC: Add with param_overrides, certainty 0)
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    -->

    <Target component="sim_c302_C2_FW" />

    <!-- Include core NeuroML2 ComponentType definitions -->

    <Include file="Cells.xml" />
    <Include file="Networks.xml" />
    <Include file="Simulation.xml" />

    <Include file="cell_C.xml" />

    <Include file="custom_muscle_components.xml" />

    <Include file="custom_synapses.xml" />

    <Include file="c302_C2_FW.net.nml" />

    <!-- End of NeuroML2 content -->

    <Simulation id="sim_c302_C2_FW" length="12000ms" step="0.05ms" target="c302_C2_FW">

        <Display id="neurons" title="c302_C2_FW: Membrane potential of a number of neurons" timeScale="1ms" xmin="-1200.0" xmax="13200.0" ymin="-60" ymax="25">

            <Line id="AVBL" quantity="AVBL/0/GenericNeuronCell/v" scale="1mV" color="#f87100" timeScale="1ms" />
            <Line id="AVBR" quantity="AVBR/0/GenericNeuronCell/v" scale="1mV" color="#ac15c4" timeScale="1ms" />
            <Line id="DB1" quantity="DB1/0/GenericNeuronCell/v" scale="1mV" color="#58a09e" timeScale="1ms" />
            <Line id="DB2" quantity="DB2/0/GenericNeuronCell/v" scale="1mV" color="#007df7" timeScale="1ms" />
            <Line id="DB3" quantity="DB3/0/GenericNeuronCell/v" scale="1mV" color="#9a1694" timeScale="1ms" />
            <Line id="DD1" quantity="DD1/0/GenericNeuronCell/v" scale="1mV" color="#7b5b40" timeScale="1ms" />
            <Line id="DD2" quantity="DD2/0/GenericNeuronCell/v" scale="1mV" color="#008200" timeScale="1ms" />
            <Line id="DD3" quantity="DD3/0/GenericNeuronCell/v" scale="1mV" color="#00962a" timeScale="1ms" />
            <Line id="VB1" quantity="VB1/0/GenericNeuronCell/v" scale="1mV" color="#c6f524" timeScale="1ms" />
            <Line id="VB2" quantity="VB2/0/GenericNeuronCell/v" scale="1mV" color="#cf2d27" timeScale="1ms" />
            <Line id="VB3" quantity="VB3/0/GenericNeuronCell/v" scale="1mV" color="#006359" timeScale="1ms" />
            <Line id="VD1" quantity="VD1/0/GenericNeuronCell/v" scale="1mV" color="#c979d2" timeScale="1ms" />
            <Line id="VD2" quantity="VD2/0/GenericNeuronCell/v" scale="1mV" color="#d14b1f" timeScale="1ms" />
            <Line id="VD3" quantity="VD3/0/GenericNeuronCell/v" scale="1mV" color="#88d57c" timeScale="1ms" />

        </Display>

        <Display id="activity_neurons" title="c302_C2_FW: Activity of a number of neurons" timeScale="1ms" xmin="-1200.0" xmax="13200.0" ymin="-0.1" ymax="1.1">

            <Line id="AVBL" quantity="AVBL/0/GenericNeuronCell/caConc" scale="1" color="#eaf195" timeScale="1ms" />
            <Line id="AVBR" quantity="AVBR/0/GenericNeuronCell/caConc" scale="1" color="#3c00ca" timeScale="1ms" />
            <Line id="DB1" quantity="DB1/0/GenericNeuronCell/caConc" scale="1" color="#262f1d" timeScale="1ms" />
            <Line id="DB2" quantity="DB2/0/GenericNeuronCell/caConc" scale="1" color="#108b77" timeScale="1ms" />
            <Line id="DB3" quantity="DB3/0/GenericNeuronCell/caConc" scale="1" color="#458fa5" timeScale="1ms" />
            <Line id="DD1" quantity="DD1/0/GenericNeuronCell/caConc" scale="1" color="#ef7488" timeScale="1ms" />
            <Line id="DD2" quantity="DD2/0/GenericNeuronCell/caConc" scale="1" color="#247960" timeScale="1ms" />
            <Line id="DD3" quantity="DD3/0/GenericNeuronCell/caConc" scale="1" color="#8f25f0" timeScale="1ms" />
            <Line id="VB1" quantity="VB1/0/GenericNeuronCell/caConc" scale="1" color="#4e0047" timeScale="1ms" />
            <Line id="VB2" quantity="VB2/0/GenericNeuronCell/caConc" scale="1" color="#f527d6" timeScale="1ms" />
            <Line id="VB3" quantity="VB3/0/GenericNeuronCell/caConc" scale="1" color="#57d17a" timeScale="1ms" />
            <Line id="VD1" quantity="VD1/0/GenericNeuronCell/caConc" scale="1" color="#e270c8" timeScale="1ms" />
            <Line id="VD2" quantity="VD2/0/GenericNeuronCell/caConc" scale="1" color="#2f701e" timeScale="1ms" />
            <Line id="VD3" quantity="VD3/0/GenericNeuronCell/caConc" scale="1" color="#d2a8a4" timeScale="1ms" />

        </Display>

        <OutputFile id="neurons_v" fileName="c302_C2_FW.dat">
            <OutputColumn id="AVBL_v" quantity="AVBL/0/GenericNeuronCell/v"/>
            <OutputColumn id="AVBR_v" quantity="AVBR/0/GenericNeuronCell/v"/>
            <OutputColumn id="DB1_v" quantity="DB1/0/GenericNeuronCell/v"/>
            <OutputColumn id="DB2_v" quantity="DB2/0/GenericNeuronCell/v"/>
            <OutputColumn id="DB3_v" quantity="DB3/0/GenericNeuronCell/v"/>
            <OutputColumn id="DD1_v" quantity="DD1/0/GenericNeuronCell/v"/>
            <OutputColumn id="DD2_v" quantity="DD2/0/GenericNeuronCell/v"/>
            <OutputColumn id="DD3_v" quantity="DD3/0/GenericNeuronCell/v"/>
            <OutputColumn id="VB1_v" quantity="VB1/0/GenericNeuronCell/v"/>
            <OutputColumn id="VB2_v" quantity="VB2/0/GenericNeuronCell/v"/>
            <OutputColumn id="VB3_v" quantity="VB3/0/GenericNeuronCell/v"/>
            <OutputColumn id="VD1_v" quantity="VD1/0/GenericNeuronCell/v"/>
            <OutputColumn id="VD2_v" quantity="VD2/0/GenericNeuronCell/v"/>
            <OutputColumn id="VD3_v" quantity="VD3/0/GenericNeuronCell/v"/>
        </OutputFile>

        <OutputFile id="neurons_activity" fileName="c302_C2_FW.activity.dat">
            <OutputColumn id="AVBL_v" quantity="AVBL/0/GenericNeuronCell/caConc"/>
            <OutputColumn id="AVBR_v" quantity="AVBR/0/GenericNeuronCell/caConc"/>
            <OutputColumn id="DB1_v" quantity="DB1/0/GenericNeuronCell/caConc"/>
            <OutputColumn id="DB2_v" quantity="DB2/0/GenericNeuronCell/caConc"/>
            <OutputColumn id="DB3_v" quantity="DB3/0/GenericNeuronCell/caConc"/>
            <OutputColumn id="DD1_v" quantity="DD1/0/GenericNeuronCell/caConc"/>
            <OutputColumn id="DD2_v" quantity="DD2/0/GenericNeuronCell/caConc"/>
            <OutputColumn id="DD3_v" quantity="DD3/0/GenericNeuronCell/caConc"/>
            <OutputColumn id="VB1_v" quantity="VB1/0/GenericNeuronCell/caConc"/>
            <OutputColumn id="VB2_v" quantity="VB2/0/GenericNeuronCell/caConc"/>
            <OutputColumn id="VB3_v" quantity="VB3/0/GenericNeuronCell/caConc"/>
            <OutputColumn id="VD1_v" quantity="VD1/0/GenericNeuronCell/caConc"/>
            <OutputColumn id="VD2_v" quantity="VD2/0/GenericNeuronCell/caConc"/>
            <OutputColumn id="VD3_v" quantity="VD3/0/GenericNeuronCell/caConc"/>
        </OutputFile>
    </Simulation>

</Lems>
