<Lems>

    <!--

Parameters and setting used to generate this network:

    Data reader:                    UpdatedSpreadsheetDataReader2
    c302 version:                   0.7.5
    PyOpenWorm version:             0.10.0.post0
    Cells:                          ['VA1', 'VB1', 'AS1', 'DA1', 'DB1', 'VD1', 'DD1', 'AVBL', 'AVBR', 'AVAL', 'AVAR']
    Cell stimulated:                []
    Connection:                     []
    Connection numbers overridden:  {'^.+-.+$': 1}
    Connection numbers scaled:      None
    Connection polarities override: {'DA1-VD2': 'inh', '^VD\\d+-VA\\d+$': 'inh', '^AS\\d+-VD\\d+$': 'inh', '^DB\\d+-VD\\d+$': 'inh', '^VA\\d+-VD\\d+$': 'inh', 'DA2-VD1': 'inh', '^DB\\d+-AS\\d+$': 'inh'}
    Muscles:                        []

    Known BioParameters:
        BioParameter: AVAL_to_DA1_elec_syn_gbase = 0.01 nS (SRC: Add with param_overrides, certainty 0)
        BioParameter: AVAL_to_VA1_elec_syn_gbase = 0.01 nS (SRC: Add with param_overrides, certainty 0)
        BioParameter: AVAR_to_DA1_elec_syn_gbase = 0.01 nS (SRC: Add with param_overrides, certainty 0)
        BioParameter: AVAR_to_VA1_elec_syn_gbase = 0.01 nS (SRC: Add with param_overrides, certainty 0)
        BioParameter: AVBL_to_VB1_elec_syn_gbase = 0.01 nS (SRC: Add with param_overrides, certainty 0)
        BioParameter: AVBR_to_DB1_elec_syn_gbase = 0.01 nS (SRC: Add with param_overrides, certainty 0)
        BioParameter: DA1_to_AVAL_elec_syn_gbase = 0.01 nS (SRC: Add with param_overrides, certainty 0)
        BioParameter: DA1_to_AVAR_elec_syn_gbase = 0.01 nS (SRC: Add with param_overrides, certainty 0)
        BioParameter: DB1_to_AVBR_elec_syn_gbase = 0.01 nS (SRC: Add with param_overrides, certainty 0)
        BioParameter: VA1_to_AVAL_elec_syn_gbase = 0.01 nS (SRC: Add with param_overrides, certainty 0)
        BioParameter: VA1_to_AVAR_elec_syn_gbase = 0.01 nS (SRC: Add with param_overrides, certainty 0)
        BioParameter: VB1_to_AVBL_elec_syn_gbase = 0.01 nS (SRC: Add with param_overrides, certainty 0)
        BioParameter: ca_boyle_erev = 10 mV (SRC: BlindGuess, certainty 0.1)
        BioParameter: ca_conc_decay_time = 13.811870945509265 ms (SRC: BlindGuess, certainty 0.1)
        BioParameter: ca_conc_decay_time_muscle = 60.8 ms (SRC: Set with param_overrides, certainty 0)
        BioParameter: ca_conc_rho = 0.000238919 mol_per_m_per_A_per_s (SRC: BlindGuess, certainty 0.1)
        BioParameter: ca_conc_rho_muscle = 0.002338919 mol_per_m_per_A_per_s (SRC: Set with param_overrides, certainty 0)
        BioParameter: cell_diameter = 5 (SRC: BlindGuess, certainty 0.1)
        BioParameter: initial_memb_pot = -50 mV (SRC: Set with param_overrides, certainty 0)
        BioParameter: k_fast_erev = -70 mV (SRC: BlindGuess, certainty 0.1)
        BioParameter: k_slow_erev = -60 mV (SRC: BlindGuess, certainty 0.1)
        BioParameter: leak_erev = -60 mV (SRC: BlindGuess, certainty 0.1)
        BioParameter: muscle_ca_boyle_cond_density = 0.812775772264702 mS_per_cm2 (SRC: BlindGuess, certainty 0.1)
        BioParameter: muscle_ca_boyle_erev = 0 mV (SRC: BlindGuess, certainty 0.1)
        BioParameter: muscle_initial_memb_pot = -28 mV (SRC: BlindGuess, certainty 0.1)
        BioParameter: muscle_k_fast_cond_density = 0.042711643917483308 mS_per_cm2 (SRC: BlindGuess, certainty 0.1)
        BioParameter: muscle_k_fast_erev = -30 mV (SRC: BlindGuess, certainty 0.1)
        BioParameter: muscle_k_slow_cond_density = 0.45833751019872582 mS_per_cm2 (SRC: BlindGuess, certainty 0.1)
        BioParameter: muscle_k_slow_erev = -30 mV (SRC: BlindGuess, certainty 0.1)
        BioParameter: muscle_leak_cond_density = 0.002 mS_per_cm2 (SRC: BlindGuess, certainty 0.1)
        BioParameter: muscle_leak_erev = -20 mV (SRC: BlindGuess, certainty 0.1)
        BioParameter: muscle_length = 20 (SRC: BlindGuess, certainty 0.1)
        BioParameter: muscle_specific_capacitance = 1 uF_per_cm2 (SRC: BlindGuess, certainty 0.1)
        BioParameter: muscle_spike_thresh = -10 mV (SRC: BlindGuess, certainty 0.1)
        BioParameter: muscle_to_muscle_elec_syn_gbase = 0 nS (SRC: BlindGuess, certainty 0.1)
        BioParameter: neuron_ca_boyle_cond_density = 1.812775772264702 mS_per_cm2 (SRC: BlindGuess, certainty 0.1)
        BioParameter: neuron_k_fast_cond_density = 0.042711643917483308 mS_per_cm2 (SRC: BlindGuess, certainty 0.1)
        BioParameter: neuron_k_slow_cond_density = 0.45833751019872582 mS_per_cm2 (SRC: BlindGuess, certainty 0.1)
        BioParameter: neuron_leak_cond_density = 0.002 mS_per_cm2 (SRC: BlindGuess, certainty 0.1)
        BioParameter: neuron_spike_thresh = -55 mV (SRC: BlindGuess, certainty 0.1)
        BioParameter: neuron_to_motor_delayed_elec_syn_gbase = 0.01252 nS (SRC: BlindGuess, certainty 0.1)
        BioParameter: neuron_to_motor_delayed_elec_syn_mu = -30 (SRC: BlindGuess, certainty 0.1)
        BioParameter: neuron_to_motor_delayed_elec_syn_sigma = 0.4 (SRC: BlindGuess, certainty 0.1)
        BioParameter: neuron_to_motor_delayed_elec_syn_weight = 1 (SRC: BlindGuess, certainty 0.1)
        BioParameter: neuron_to_muscle_elec_syn_gbase = 0.00152 nS (SRC: BlindGuess, certainty 0.1)
        BioParameter: neuron_to_muscle_exc_syn_conductance = 0.10 nS (SRC: BlindGuess, certainty 0.1)
        BioParameter: neuron_to_muscle_exc_syn_delta = 19 mV (SRC: BlindGuess, certainty 0.1)
        BioParameter: neuron_to_muscle_exc_syn_erev = 37 mV (SRC: BlindGuess, certainty 0.1)
        BioParameter: neuron_to_muscle_exc_syn_k = 1.205per_ms (SRC: BlindGuess, certainty 0.1)
        BioParameter: neuron_to_muscle_exc_syn_mu = 5 mV (SRC: BlindGuess, certainty 0.1)
        BioParameter: neuron_to_muscle_exc_syn_sigma = 0.5 per_mV (SRC: BlindGuess, certainty 0.1)
        BioParameter: neuron_to_muscle_exc_syn_vth = 27 mV (SRC: BlindGuess, certainty 0.1)
        BioParameter: neuron_to_muscle_exc_syn_weight = 1 (SRC: BlindGuess, certainty 0.1)
        BioParameter: neuron_to_muscle_inh_syn_conductance = 1.29 nS (SRC: BlindGuess, certainty 0.1)
        BioParameter: neuron_to_muscle_inh_syn_delta = 5 mV (SRC: BlindGuess, certainty 0.1)
        BioParameter: neuron_to_muscle_inh_syn_erev = -35 mV (SRC: BlindGuess, certainty 0.1)
        BioParameter: neuron_to_muscle_inh_syn_k = 0.025per_ms (SRC: BlindGuess, certainty 0.1)
        BioParameter: neuron_to_muscle_inh_syn_vth = 0 mV (SRC: BlindGuess, certainty 0.1)
        BioParameter: neuron_to_neuron_elec_syn_gbase = 0.01252 nS (SRC: BlindGuess, certainty 0.1)
        BioParameter: neuron_to_neuron_elec_syn_weight = 1 (SRC: BlindGuess, certainty 0.1)
        BioParameter: neuron_to_neuron_exc_syn_conductance = 0.49 nS (SRC: BlindGuess, certainty 0.1)
        BioParameter: neuron_to_neuron_exc_syn_delta = 5 mV (SRC: BlindGuess, certainty 0.1)
        BioParameter: neuron_to_neuron_exc_syn_erev = -10 mV (SRC: BlindGuess, certainty 0.1)
        BioParameter: neuron_to_neuron_exc_syn_k = 0.5per_ms (SRC: BlindGuess, certainty 0.1)
        BioParameter: neuron_to_neuron_exc_syn_vth = 00 mV (SRC: BlindGuess, certainty 0.1)
        BioParameter: neuron_to_neuron_inh_syn_conductance = 0.29 nS (SRC: BlindGuess, certainty 0.1)
        BioParameter: neuron_to_neuron_inh_syn_delta = 5 mV (SRC: BlindGuess, certainty 0.1)
        BioParameter: neuron_to_neuron_inh_syn_erev = -70 mV (SRC: BlindGuess, certainty 0.1)
        BioParameter: neuron_to_neuron_inh_syn_k = 0.015per_ms (SRC: BlindGuess, certainty 0.1)
        BioParameter: neuron_to_neuron_inh_syn_vth = 0 mV (SRC: BlindGuess, certainty 0.1)
        BioParameter: specific_capacitance = 5 uF_per_cm2 (SRC: BlindGuess, certainty 0.1)
        BioParameter: unphysiological_offset_current = 0 pA (SRC: KnownError, certainty 0)
        BioParameter: unphysiological_offset_current_del = 0 ms (SRC: KnownError, certainty 0)
        BioParameter: unphysiological_offset_current_dur = 2000 ms (SRC: KnownError, certainty 0)

    -->

    <Target component="sim_c302_C2_FWandBW_first" />

    <!-- Include core NeuroML2 ComponentType definitions -->

    <Include file="Cells.xml" />
    <Include file="Networks.xml" />
    <Include file="Simulation.xml" />

    <Include file="cell_C.xml" />

    <Include file="custom_muscle_components.xml" />

    <Include file="custom_synapses.xml" />

    <Include file="c302_C2_FWandBW_first.net.nml" />

    <!-- End of NeuroML2 content -->

    <Simulation id="sim_c302_C2_FWandBW_first" length="12000ms" step="0.05ms" target="c302_C2_FWandBW_first">

        <Display id="neurons" title="c302_C2_FWandBW_first: Membrane potential of a number of neurons" timeScale="1ms" xmin="-1200.0" xmax="13200.0" ymin="-60" ymax="25">

            <Line id="AS1" quantity="AS1/0/GenericNeuronCell/v" scale="1mV" color="#f87100" timeScale="1ms" />
            <Line id="AVAL" quantity="AVAL/0/GenericNeuronCell/v" scale="1mV" color="#ac15c4" timeScale="1ms" />
            <Line id="AVAR" quantity="AVAR/0/GenericNeuronCell/v" scale="1mV" color="#58a09e" timeScale="1ms" />
            <Line id="AVBL" quantity="AVBL/0/GenericNeuronCell/v" scale="1mV" color="#007df7" timeScale="1ms" />
            <Line id="AVBR" quantity="AVBR/0/GenericNeuronCell/v" scale="1mV" color="#9a1694" timeScale="1ms" />
            <Line id="DA1" quantity="DA1/0/GenericNeuronCell/v" scale="1mV" color="#7b5b40" timeScale="1ms" />
            <Line id="DB1" quantity="DB1/0/GenericNeuronCell/v" scale="1mV" color="#008200" timeScale="1ms" />
            <Line id="DD1" quantity="DD1/0/GenericNeuronCell/v" scale="1mV" color="#00962a" timeScale="1ms" />
            <Line id="VA1" quantity="VA1/0/GenericNeuronCell/v" scale="1mV" color="#c6f524" timeScale="1ms" />
            <Line id="VB1" quantity="VB1/0/GenericNeuronCell/v" scale="1mV" color="#cf2d27" timeScale="1ms" />
            <Line id="VD1" quantity="VD1/0/GenericNeuronCell/v" scale="1mV" color="#006359" timeScale="1ms" />

        </Display>

        <Display id="activity_neurons" title="c302_C2_FWandBW_first: Activity of a number of neurons" timeScale="1ms" xmin="-1200.0" xmax="13200.0" ymin="-0.1" ymax="1.1">

            <Line id="AS1" quantity="AS1/0/GenericNeuronCell/caConc" scale="1" color="#eaf195" timeScale="1ms" />
            <Line id="AVAL" quantity="AVAL/0/GenericNeuronCell/caConc" scale="1" color="#3c00ca" timeScale="1ms" />
            <Line id="AVAR" quantity="AVAR/0/GenericNeuronCell/caConc" scale="1" color="#262f1d" timeScale="1ms" />
            <Line id="AVBL" quantity="AVBL/0/GenericNeuronCell/caConc" scale="1" color="#108b77" timeScale="1ms" />
            <Line id="AVBR" quantity="AVBR/0/GenericNeuronCell/caConc" scale="1" color="#458fa5" timeScale="1ms" />
            <Line id="DA1" quantity="DA1/0/GenericNeuronCell/caConc" scale="1" color="#ef7488" timeScale="1ms" />
            <Line id="DB1" quantity="DB1/0/GenericNeuronCell/caConc" scale="1" color="#247960" timeScale="1ms" />
            <Line id="DD1" quantity="DD1/0/GenericNeuronCell/caConc" scale="1" color="#8f25f0" timeScale="1ms" />
            <Line id="VA1" quantity="VA1/0/GenericNeuronCell/caConc" scale="1" color="#4e0047" timeScale="1ms" />
            <Line id="VB1" quantity="VB1/0/GenericNeuronCell/caConc" scale="1" color="#f527d6" timeScale="1ms" />
            <Line id="VD1" quantity="VD1/0/GenericNeuronCell/caConc" scale="1" color="#57d17a" timeScale="1ms" />

        </Display>

        <OutputFile id="neurons_v" fileName="c302_C2_FWandBW_first.dat">
            <OutputColumn id="AS1_v" quantity="AS1/0/GenericNeuronCell/v"/>
            <OutputColumn id="AVAL_v" quantity="AVAL/0/GenericNeuronCell/v"/>
            <OutputColumn id="AVAR_v" quantity="AVAR/0/GenericNeuronCell/v"/>
            <OutputColumn id="AVBL_v" quantity="AVBL/0/GenericNeuronCell/v"/>
            <OutputColumn id="AVBR_v" quantity="AVBR/0/GenericNeuronCell/v"/>
            <OutputColumn id="DA1_v" quantity="DA1/0/GenericNeuronCell/v"/>
            <OutputColumn id="DB1_v" quantity="DB1/0/GenericNeuronCell/v"/>
            <OutputColumn id="DD1_v" quantity="DD1/0/GenericNeuronCell/v"/>
            <OutputColumn id="VA1_v" quantity="VA1/0/GenericNeuronCell/v"/>
            <OutputColumn id="VB1_v" quantity="VB1/0/GenericNeuronCell/v"/>
            <OutputColumn id="VD1_v" quantity="VD1/0/GenericNeuronCell/v"/>
        </OutputFile>

        <OutputFile id="neurons_activity" fileName="c302_C2_FWandBW_first.activity.dat">
            <OutputColumn id="AS1_v" quantity="AS1/0/GenericNeuronCell/caConc"/>
            <OutputColumn id="AVAL_v" quantity="AVAL/0/GenericNeuronCell/caConc"/>
            <OutputColumn id="AVAR_v" quantity="AVAR/0/GenericNeuronCell/caConc"/>
            <OutputColumn id="AVBL_v" quantity="AVBL/0/GenericNeuronCell/caConc"/>
            <OutputColumn id="AVBR_v" quantity="AVBR/0/GenericNeuronCell/caConc"/>
            <OutputColumn id="DA1_v" quantity="DA1/0/GenericNeuronCell/caConc"/>
            <OutputColumn id="DB1_v" quantity="DB1/0/GenericNeuronCell/caConc"/>
            <OutputColumn id="DD1_v" quantity="DD1/0/GenericNeuronCell/caConc"/>
            <OutputColumn id="VA1_v" quantity="VA1/0/GenericNeuronCell/caConc"/>
            <OutputColumn id="VB1_v" quantity="VB1/0/GenericNeuronCell/caConc"/>
            <OutputColumn id="VD1_v" quantity="VD1/0/GenericNeuronCell/caConc"/>
        </OutputFile>
    </Simulation>

</Lems>
