<neuroml xmlns="http://www.neuroml.org/schema/neuroml2"  xmlns:xs="http://www.w3.org/2001/XMLSchema" xmlns:xsi="http://www.w3.org/2001/XMLSchema-instance" xsi:schemaLocation="http://www.neuroml.org/schema/neuroml2 https://raw.github.com/NeuroML/NeuroML2/development/Schemas/NeuroML2/NeuroML_v2beta5.xsd" id="c302_C2_FWandBW_first">
    <notes>

Parameters and setting used to generate this network:

    Data reader:                    UpdatedSpreadsheetDataReader2
    c302 version:                   0.7.5
    PyOpenWorm version:             0.10.0.post0
    Cells:                          ['VA1', 'VB1', 'AS1', 'DA1', 'DB1', 'VD1', 'DD1', 'AVBL', 'AVBR', 'AVAL', 'AVAR']
    Cell stimulated:                []
    Connection:                     []
    Connection numbers overridden:  {'^.+-.+$': 1}
    Connection numbers scaled:      None
    Connection polarities override: {'DA1-VD2': 'inh', '^VD\\d+-VA\\d+$': 'inh', '^AS\\d+-VD\\d+$': 'inh', '^DB\\d+-VD\\d+$': 'inh', '^VA\\d+-VD\\d+$': 'inh', 'DA2-VD1': 'inh', '^DB\\d+-AS\\d+$': 'inh'}
    Muscles:                        []

    Known BioParameters:
        BioParameter: AVAL_to_DA1_elec_syn_gbase = 0.01 nS (SRC: Add with param_overrides, certainty 0)
        BioParameter: AVAL_to_VA1_elec_syn_gbase = 0.01 nS (SRC: Add with param_overrides, certainty 0)
        BioParameter: AVAR_to_DA1_elec_syn_gbase = 0.01 nS (SRC: Add with param_overrides, certainty 0)
        BioParameter: AVAR_to_VA1_elec_syn_gbase = 0.01 nS (SRC: Add with param_overrides, certainty 0)
        BioParameter: AVBL_to_VB1_elec_syn_gbase = 0.01 nS (SRC: Add with param_overrides, certainty 0)
        BioParameter: AVBR_to_DB1_elec_syn_gbase = 0.01 nS (SRC: Add with param_overrides, certainty 0)
        BioParameter: DA1_to_AVAL_elec_syn_gbase = 0.01 nS (SRC: Add with param_overrides, certainty 0)
        BioParameter: DA1_to_AVAR_elec_syn_gbase = 0.01 nS (SRC: Add with param_overrides, certainty 0)
        BioParameter: DB1_to_AVBR_elec_syn_gbase = 0.01 nS (SRC: Add with param_overrides, certainty 0)
        BioParameter: VA1_to_AVAL_elec_syn_gbase = 0.01 nS (SRC: Add with param_overrides, certainty 0)
        BioParameter: VA1_to_AVAR_elec_syn_gbase = 0.01 nS (SRC: Add with param_overrides, certainty 0)
        BioParameter: VB1_to_AVBL_elec_syn_gbase = 0.01 nS (SRC: Add with param_overrides, certainty 0)
        BioParameter: ca_boyle_erev = 10 mV (SRC: BlindGuess, certainty 0.1)
        BioParameter: ca_conc_decay_time = 13.811870945509265 ms (SRC: BlindGuess, certainty 0.1)
        BioParameter: ca_conc_decay_time_muscle = 60.8 ms (SRC: Set with param_overrides, certainty 0)
        BioParameter: ca_conc_rho = 0.000238919 mol_per_m_per_A_per_s (SRC: BlindGuess, certainty 0.1)
        BioParameter: ca_conc_rho_muscle = 0.002338919 mol_per_m_per_A_per_s (SRC: Set with param_overrides, certainty 0)
        BioParameter: cell_diameter = 5 (SRC: BlindGuess, certainty 0.1)
        BioParameter: initial_memb_pot = -50 mV (SRC: Set with param_overrides, certainty 0)
        BioParameter: k_fast_erev = -70 mV (SRC: BlindGuess, certainty 0.1)
        BioParameter: k_slow_erev = -60 mV (SRC: BlindGuess, certainty 0.1)
        BioParameter: leak_erev = -60 mV (SRC: BlindGuess, certainty 0.1)
        BioParameter: muscle_ca_boyle_cond_density = 0.812775772264702 mS_per_cm2 (SRC: BlindGuess, certainty 0.1)
        BioParameter: muscle_ca_boyle_erev = 0 mV (SRC: BlindGuess, certainty 0.1)
        BioParameter: muscle_initial_memb_pot = -28 mV (SRC: BlindGuess, certainty 0.1)
        BioParameter: muscle_k_fast_cond_density = 0.042711643917483308 mS_per_cm2 (SRC: BlindGuess, certainty 0.1)
        BioParameter: muscle_k_fast_erev = -30 mV (SRC: BlindGuess, certainty 0.1)
        BioParameter: muscle_k_slow_cond_density = 0.45833751019872582 mS_per_cm2 (SRC: BlindGuess, certainty 0.1)
        BioParameter: muscle_k_slow_erev = -30 mV (SRC: BlindGuess, certainty 0.1)
        BioParameter: muscle_leak_cond_density = 0.002 mS_per_cm2 (SRC: BlindGuess, certainty 0.1)
        BioParameter: muscle_leak_erev = -20 mV (SRC: BlindGuess, certainty 0.1)
        BioParameter: muscle_length = 20 (SRC: BlindGuess, certainty 0.1)
        BioParameter: muscle_specific_capacitance = 1 uF_per_cm2 (SRC: BlindGuess, certainty 0.1)
        BioParameter: muscle_spike_thresh = -10 mV (SRC: BlindGuess, certainty 0.1)
        BioParameter: muscle_to_muscle_elec_syn_gbase = 0 nS (SRC: BlindGuess, certainty 0.1)
        BioParameter: neuron_ca_boyle_cond_density = 1.812775772264702 mS_per_cm2 (SRC: BlindGuess, certainty 0.1)
        BioParameter: neuron_k_fast_cond_density = 0.042711643917483308 mS_per_cm2 (SRC: BlindGuess, certainty 0.1)
        BioParameter: neuron_k_slow_cond_density = 0.45833751019872582 mS_per_cm2 (SRC: BlindGuess, certainty 0.1)
        BioParameter: neuron_leak_cond_density = 0.002 mS_per_cm2 (SRC: BlindGuess, certainty 0.1)
        BioParameter: neuron_spike_thresh = -55 mV (SRC: BlindGuess, certainty 0.1)
        BioParameter: neuron_to_motor_delayed_elec_syn_gbase = 0.01252 nS (SRC: BlindGuess, certainty 0.1)
        BioParameter: neuron_to_motor_delayed_elec_syn_mu = -30 (SRC: BlindGuess, certainty 0.1)
        BioParameter: neuron_to_motor_delayed_elec_syn_sigma = 0.4 (SRC: BlindGuess, certainty 0.1)
        BioParameter: neuron_to_motor_delayed_elec_syn_weight = 1 (SRC: BlindGuess, certainty 0.1)
        BioParameter: neuron_to_muscle_elec_syn_gbase = 0.00152 nS (SRC: BlindGuess, certainty 0.1)
        BioParameter: neuron_to_muscle_exc_syn_conductance = 0.10 nS (SRC: BlindGuess, certainty 0.1)
        BioParameter: neuron_to_muscle_exc_syn_delta = 19 mV (SRC: BlindGuess, certainty 0.1)
        BioParameter: neuron_to_muscle_exc_syn_erev = 37 mV (SRC: BlindGuess, certainty 0.1)
        BioParameter: neuron_to_muscle_exc_syn_k = 1.205per_ms (SRC: BlindGuess, certainty 0.1)
        BioParameter: neuron_to_muscle_exc_syn_mu = 5 mV (SRC: BlindGuess, certainty 0.1)
        BioParameter: neuron_to_muscle_exc_syn_sigma = 0.5 per_mV (SRC: BlindGuess, certainty 0.1)
        BioParameter: neuron_to_muscle_exc_syn_vth = 27 mV (SRC: BlindGuess, certainty 0.1)
        BioParameter: neuron_to_muscle_exc_syn_weight = 1 (SRC: BlindGuess, certainty 0.1)
        BioParameter: neuron_to_muscle_inh_syn_conductance = 1.29 nS (SRC: BlindGuess, certainty 0.1)
        BioParameter: neuron_to_muscle_inh_syn_delta = 5 mV (SRC: BlindGuess, certainty 0.1)
        BioParameter: neuron_to_muscle_inh_syn_erev = -35 mV (SRC: BlindGuess, certainty 0.1)
        BioParameter: neuron_to_muscle_inh_syn_k = 0.025per_ms (SRC: BlindGuess, certainty 0.1)
        BioParameter: neuron_to_muscle_inh_syn_vth = 0 mV (SRC: BlindGuess, certainty 0.1)
        BioParameter: neuron_to_neuron_elec_syn_gbase = 0.01252 nS (SRC: BlindGuess, certainty 0.1)
        BioParameter: neuron_to_neuron_elec_syn_weight = 1 (SRC: BlindGuess, certainty 0.1)
        BioParameter: neuron_to_neuron_exc_syn_conductance = 0.49 nS (SRC: BlindGuess, certainty 0.1)
        BioParameter: neuron_to_neuron_exc_syn_delta = 5 mV (SRC: BlindGuess, certainty 0.1)
        BioParameter: neuron_to_neuron_exc_syn_erev = -10 mV (SRC: BlindGuess, certainty 0.1)
        BioParameter: neuron_to_neuron_exc_syn_k = 0.5per_ms (SRC: BlindGuess, certainty 0.1)
        BioParameter: neuron_to_neuron_exc_syn_vth = 00 mV (SRC: BlindGuess, certainty 0.1)
        BioParameter: neuron_to_neuron_inh_syn_conductance = 0.29 nS (SRC: BlindGuess, certainty 0.1)
        BioParameter: neuron_to_neuron_inh_syn_delta = 5 mV (SRC: BlindGuess, certainty 0.1)
        BioParameter: neuron_to_neuron_inh_syn_erev = -70 mV (SRC: BlindGuess, certainty 0.1)
        BioParameter: neuron_to_neuron_inh_syn_k = 0.015per_ms (SRC: BlindGuess, certainty 0.1)
        BioParameter: neuron_to_neuron_inh_syn_vth = 0 mV (SRC: BlindGuess, certainty 0.1)
        BioParameter: specific_capacitance = 5 uF_per_cm2 (SRC: BlindGuess, certainty 0.1)
        BioParameter: unphysiological_offset_current = 0 pA (SRC: KnownError, certainty 0)
        BioParameter: unphysiological_offset_current_del = 0 ms (SRC: KnownError, certainty 0)
        BioParameter: unphysiological_offset_current_dur = 2000 ms (SRC: KnownError, certainty 0)

</notes>
    <include href="cell_C.xml"/>
    <include href="custom_muscle_components.xml"/>
    <include href="custom_synapses.xml"/>
    <fixedFactorConcentrationModel id="CaPool" ion="ca" restingConc="0 mM" decayConstant="13.811870945509265 ms" rho="0.000238919 mol_per_m_per_A_per_s"/>
    <fixedFactorConcentrationModel id="CaPoolMuscle" ion="ca" restingConc="0 mM" decayConstant="60.8 ms" rho="0.002338919 mol_per_m_per_A_per_s"/>
    <gapJunction id="neuron_to_neuron_elec_syn" conductance="0.01252 nS"/>
    <gapJunction id="AVAL_to_DA1_elec_syn" conductance="0.01 nS"/>
    <gapJunction id="AVAL_to_VA1_elec_syn" conductance="0.01 nS"/>
    <gapJunction id="AVAR_to_DA1_elec_syn" conductance="0.01 nS"/>
    <gapJunction id="AVAR_to_VA1_elec_syn" conductance="0.01 nS"/>
    <gapJunction id="AVBL_to_VB1_elec_syn" conductance="0.01 nS"/>
    <gapJunction id="AVBR_to_DB1_elec_syn" conductance="0.01 nS"/>
    <gapJunction id="DA1_to_AVAL_elec_syn" conductance="0.01 nS"/>
    <gapJunction id="DA1_to_AVAR_elec_syn" conductance="0.01 nS"/>
    <gapJunction id="DB1_to_AVBR_elec_syn" conductance="0.01 nS"/>
    <gapJunction id="VA1_to_AVAL_elec_syn" conductance="0.01 nS"/>
    <gapJunction id="VA1_to_AVAR_elec_syn" conductance="0.01 nS"/>
    <gapJunction id="VB1_to_AVBL_elec_syn" conductance="0.01 nS"/>
    <silentSynapse id="silent"/>
    <gradedSynapse id="neuron_to_neuron_exc_syn" conductance="0.49 nS" delta="5 mV" Vth="00 mV" k="0.5per_ms" erev="-10 mV"/>
    <gradedSynapse id="neuron_to_neuron_inh_syn" conductance="0.29 nS" delta="5 mV" Vth="0 mV" k="0.015per_ms" erev="-70 mV"/>
    <cell id="GenericMuscleCell">
        <morphology id="morphology_GenericMuscleCell">
            <segment id="0" name="soma">
                <proximal x="0.000000e+00" y="0.000000e+00" z="0.000000e+00" diameter="5.0"/>
                <distal x="0.000000e+00" y="2.000000e+01" z="0.000000e+00" diameter="5.0"/>
            </segment>
        </morphology>
        <biophysicalProperties id="biophys_GenericMuscleCell">
            <membraneProperties>
                <channelDensity id="Leak_all" ionChannel="Leak" condDensity="0.002 mS_per_cm2" erev="-20 mV" ion="non_specific"/>
                <channelDensity id="k_slow_all" ionChannel="k_slow_muscle" condDensity="0.45833751019872582 mS_per_cm2" erev="-30 mV" ion="k"/>
                <channelDensity id="k_fast_all" ionChannel="k_fast_muscle" condDensity="0.042711643917483308 mS_per_cm2" erev="-30 mV" ion="k"/>
                <channelDensity id="ca_boyle_all" ionChannel="ca_boyle_muscle" condDensity="0.812775772264702 mS_per_cm2" erev="0 mV" ion="ca"/>
                <spikeThresh value="-10 mV"/>
                <specificCapacitance value="1 uF_per_cm2"/>
                <initMembPotential value="-28 mV"/>
            </membraneProperties>
            <intracellularProperties>
                <species id="ca" concentrationModel="CaPoolMuscle" ion="ca" initialConcentration="0 mM" initialExtConcentration="2E-6 mol_per_cm3"/>
                <resistivity value="0.1 kohm_cm"/>
            </intracellularProperties>
        </biophysicalProperties>
    </cell>
    <cell id="GenericNeuronCell">
        <morphology id="morphology_GenericNeuronCell">
            <segment id="0" name="soma">
                <proximal x="0.000000e+00" y="0.000000e+00" z="0.000000e+00" diameter="5.0"/>
                <distal x="0.000000e+00" y="0.000000e+00" z="0.000000e+00" diameter="5.0"/>
            </segment>
        </morphology>
        <biophysicalProperties id="biophys_GenericNeuronCell">
            <membraneProperties>
                <channelDensity id="Leak_all" ionChannel="Leak" condDensity="0.002 mS_per_cm2" erev="-60 mV" ion="non_specific"/>
                <channelDensity id="k_slow_all" ionChannel="k_slow" condDensity="0.45833751019872582 mS_per_cm2" erev="-60 mV" ion="k"/>
                <channelDensity id="k_fast_all" ionChannel="k_fast" condDensity="0.042711643917483308 mS_per_cm2" erev="-70 mV" ion="k"/>
                <channelDensity id="ca_boyle_all" ionChannel="ca_boyle" condDensity="1.812775772264702 mS_per_cm2" erev="10 mV" ion="ca"/>
                <spikeThresh value="-55 mV"/>
                <specificCapacitance value="5 uF_per_cm2"/>
                <initMembPotential value="-50 mV"/>
            </membraneProperties>
            <intracellularProperties>
                <species id="ca" concentrationModel="CaPool" ion="ca" initialConcentration="0 mM" initialExtConcentration="2E-6 mol_per_cm3"/>
                <resistivity value="0.1 kohm_cm"/>
            </intracellularProperties>
        </biophysicalProperties>
    </cell>
    <pulseGenerator id="offset_current" delay="0 ms" duration="2000 ms" amplitude="0 pA"/>
    <pulseGenerator id="stim_AVBL_1" delay="0ms" duration="3000ms" amplitude="15pA"/>
    <pulseGenerator id="stim_AVBR_1" delay="0ms" duration="3000ms" amplitude="15pA"/>
    <pulseGenerator id="stim_AVAL_1" delay="3000ms" duration="6000ms" amplitude="15pA"/>
    <pulseGenerator id="stim_AVAR_1" delay="3000ms" duration="6000ms" amplitude="15pA"/>
    <pulseGenerator id="stim_AVBL_2" delay="9000ms" duration="3000ms" amplitude="15pA"/>
    <pulseGenerator id="stim_AVBR_2" delay="9000ms" duration="3000ms" amplitude="15pA"/>
    <sineGenerator id="stim_DB1_1" delay="0ms" phase="-0.21264" duration="15000ms" amplitude="2pA" period="800ms"/>
    <sineGenerator id="stim_VB1_1" delay="0ms" phase="-0.18606" duration="15000ms" amplitude="-2pA" period="800ms"/>
    <sineGenerator id="stim_DA1_1" delay="0ms" phase="0" duration="15000ms" amplitude="-2pA" period="800ms"/>
    <sineGenerator id="stim_VA1_1" delay="0ms" phase="0" duration="15000ms" amplitude="2pA" period="800ms"/>
    <network id="c302_C2_FWandBW_first">
        <population id="AS1" component="GenericNeuronCell" size="1" type="populationList">
            <property tag="type" value="motor"/>
            <property tag="receptor" value="ACR-14; ACR-15; CKR-2; DOP-1; DOP-3; LGC-46; NPR-3; UNC-63"/>
            <property tag="neurotransmitter" value="Acetylcholine"/>
            <property tag="OpenWormBackerAssignedName" value="Kottbusser Tor"/>
            <instance id="0">
                <location x="-0.275" y="-229.038000000000011" z="4.738"/>
            </instance>
        </population>
        <population id="AVAL" component="GenericNeuronCell" size="1" type="populationList">
            <property tag="type" value="interneuron"/>
            <property tag="receptor" value="GGR-3; GLR-1; GLR-2; GLR-4; GLR-5; NMR-1; NMR-2; NPR-4; UNC-8"/>
            <property tag="neurotransmitter" value=""/>
            <property tag="OpenWormBackerAssignedName" value="JUD"/>
            <instance id="0">
                <location x="-0.55" y="-271.5" z="37.982999999999997"/>
            </instance>
        </population>
        <population id="AVAR" component="GenericNeuronCell" size="1" type="populationList">
            <property tag="type" value="interneuron"/>
            <property tag="receptor" value="GGR-3; GLR-1; GLR-2; GLR-4; GLR-5; NMR-1; NMR-2; NPR-4; UNC-8"/>
            <property tag="neurotransmitter" value=""/>
            <instance id="0">
                <location x="-3.5" y="-271.5" z="37.982999999999997"/>
            </instance>
        </population>
        <population id="AVBL" component="GenericNeuronCell" size="1" type="populationList">
            <property tag="type" value="interneuron"/>
            <property tag="receptor" value="GGR-3; GLR-1; GLR-5; LGC-55; SRA-11; UNC-8"/>
            <property tag="neurotransmitter" value=""/>
            <instance id="0">
                <location x="0.225" y="-269.793999999999983" z="37.863002999999999"/>
            </instance>
        </population>
        <population id="AVBR" component="GenericNeuronCell" size="1" type="populationList">
            <property tag="type" value="interneuron"/>
            <property tag="receptor" value="GGR-3; GLR-1; GLR-5; LGC-55; SRA-11; UNC-8"/>
            <property tag="neurotransmitter" value=""/>
            <property tag="OpenWormBackerAssignedName" value="mn"/>
            <instance id="0">
                <location x="-4.581" y="-269.793999999999983" z="37.863002999999999"/>
            </instance>
        </population>
        <population id="DA1" component="GenericNeuronCell" size="1" type="populationList">
            <property tag="type" value="motor"/>
            <property tag="receptor" value="CKR-2; DOP-1; DOP-3; NPR-3; SER-2; UNC-8"/>
            <property tag="neurotransmitter" value="Acetylcholine"/>
            <property tag="OpenWormBackerAssignedName" value="KR"/>
            <instance id="0">
                <location x="-0.75" y="-227.075009999999992" z="3.425"/>
            </instance>
        </population>
        <population id="DB1" component="GenericNeuronCell" size="1" type="populationList">
            <property tag="type" value="motor"/>
            <property tag="receptor" value="CKR-2; DOP-1; DOP-3; NPR-3"/>
            <property tag="neurotransmitter" value="Acetylcholine"/>
            <instance id="0">
                <location x="-1.9" y="-230.349989999999991" z="6.85"/>
            </instance>
        </population>
        <population id="DD1" component="GenericNeuronCell" size="1" type="populationList">
            <property tag="type" value="motor"/>
            <property tag="receptor" value="DOP-3; MOD-1; NPR-1"/>
            <property tag="neurotransmitter" value="GABA"/>
            <property tag="OpenWormBackerAssignedName" value="Stanislav Petrov"/>
            <instance id="0">
                <location x="-0.9" y="-231.949999999999989" z="6.85"/>
            </instance>
        </population>
        <population id="VA1" component="GenericNeuronCell" size="1" type="populationList">
            <property tag="type" value="motor"/>
            <property tag="receptor" value="CKR-2; DOP-1; DOP-3; LGC-53; NPR-3"/>
            <property tag="neurotransmitter" value="Acetylcholine"/>
            <instance id="0">
                <location x="-1.35" y="-235.550000000000011" z="11.75"/>
            </instance>
        </population>
        <population id="VB1" component="GenericNeuronCell" size="1" type="populationList">
            <property tag="type" value="motor; sensory"/>
            <property tag="receptor" value="CKR-2; DOP-1; DOP-3; NPR-3"/>
            <property tag="neurotransmitter" value="Acetylcholine"/>
            <property tag="OpenWormBackerAssignedName" value="NoTex.ch"/>
            <instance id="0">
                <location x="-1.55" y="-246.449999999999989" z="16.399999999999999"/>
            </instance>
        </population>
        <population id="VD1" component="GenericNeuronCell" size="1" type="populationList">
            <property tag="type" value="motor"/>
            <property tag="receptor" value="DOP-3; MOD-1; NPR-1; SER-2"/>
            <property tag="neurotransmitter" value="GABA"/>
            <property tag="OpenWormBackerAssignedName" value="Ackley Lab"/>
            <instance id="0">
                <location x="-0.70000005" y="-228.599999999999994" z="4.05"/>
            </instance>
        </population>
        <electricalProjection id="NC_AVAL_AVAR_Generic_GJ" presynapticPopulation="AVAL" postsynapticPopulation="AVAR">
            <electricalConnectionInstanceW id="0" preCell="../AVAL/0/GenericNeuronCell" postCell="../AVAR/0/GenericNeuronCell" synapse="neuron_to_neuron_elec_syn" weight="1."/>
        </electricalProjection>
        <electricalProjection id="NC_AVAL_DA1_Generic_GJ" presynapticPopulation="AVAL" postsynapticPopulation="DA1">
            <electricalConnectionInstanceW id="0" preCell="../AVAL/0/GenericNeuronCell" postCell="../DA1/0/GenericNeuronCell" synapse="AVAL_to_DA1_elec_syn" weight="1."/>
        </electricalProjection>
        <electricalProjection id="NC_AVAL_VA1_Generic_GJ" presynapticPopulation="AVAL" postsynapticPopulation="VA1">
            <electricalConnectionInstanceW id="0" preCell="../AVAL/0/GenericNeuronCell" postCell="../VA1/0/GenericNeuronCell" synapse="AVAL_to_VA1_elec_syn" weight="1."/>
        </electricalProjection>
        <electricalProjection id="NC_AVAR_AVAL_Generic_GJ" presynapticPopulation="AVAR" postsynapticPopulation="AVAL">
            <electricalConnectionInstanceW id="0" preCell="../AVAR/0/GenericNeuronCell" postCell="../AVAL/0/GenericNeuronCell" synapse="neuron_to_neuron_elec_syn" weight="1."/>
        </electricalProjection>
        <electricalProjection id="NC_AVAR_DA1_Generic_GJ" presynapticPopulation="AVAR" postsynapticPopulation="DA1">
            <electricalConnectionInstanceW id="0" preCell="../AVAR/0/GenericNeuronCell" postCell="../DA1/0/GenericNeuronCell" synapse="AVAR_to_DA1_elec_syn" weight="1."/>
        </electricalProjection>
        <electricalProjection id="NC_AVAR_VA1_Generic_GJ" presynapticPopulation="AVAR" postsynapticPopulation="VA1">
            <electricalConnectionInstanceW id="0" preCell="../AVAR/0/GenericNeuronCell" postCell="../VA1/0/GenericNeuronCell" synapse="AVAR_to_VA1_elec_syn" weight="1."/>
        </electricalProjection>
        <electricalProjection id="NC_AVBL_AVBR_Generic_GJ" presynapticPopulation="AVBL" postsynapticPopulation="AVBR">
            <electricalConnectionInstanceW id="0" preCell="../AVBL/0/GenericNeuronCell" postCell="../AVBR/0/GenericNeuronCell" synapse="neuron_to_neuron_elec_syn" weight="1."/>
        </electricalProjection>
        <electricalProjection id="NC_AVBL_VB1_Generic_GJ" presynapticPopulation="AVBL" postsynapticPopulation="VB1">
            <electricalConnectionInstanceW id="0" preCell="../AVBL/0/GenericNeuronCell" postCell="../VB1/0/GenericNeuronCell" synapse="AVBL_to_VB1_elec_syn" weight="1."/>
        </electricalProjection>
        <electricalProjection id="NC_AVBR_AVBL_Generic_GJ" presynapticPopulation="AVBR" postsynapticPopulation="AVBL">
            <electricalConnectionInstanceW id="0" preCell="../AVBR/0/GenericNeuronCell" postCell="../AVBL/0/GenericNeuronCell" synapse="neuron_to_neuron_elec_syn" weight="1."/>
        </electricalProjection>
        <electricalProjection id="NC_AVBR_DB1_Generic_GJ" presynapticPopulation="AVBR" postsynapticPopulation="DB1">
            <electricalConnectionInstanceW id="0" preCell="../AVBR/0/GenericNeuronCell" postCell="../DB1/0/GenericNeuronCell" synapse="AVBR_to_DB1_elec_syn" weight="1."/>
        </electricalProjection>
        <electricalProjection id="NC_DA1_AVAL_Generic_GJ" presynapticPopulation="DA1" postsynapticPopulation="AVAL">
            <electricalConnectionInstanceW id="0" preCell="../DA1/0/GenericNeuronCell" postCell="../AVAL/0/GenericNeuronCell" synapse="DA1_to_AVAL_elec_syn" weight="1."/>
        </electricalProjection>
        <electricalProjection id="NC_DA1_AVAR_Generic_GJ" presynapticPopulation="DA1" postsynapticPopulation="AVAR">
            <electricalConnectionInstanceW id="0" preCell="../DA1/0/GenericNeuronCell" postCell="../AVAR/0/GenericNeuronCell" synapse="DA1_to_AVAR_elec_syn" weight="1."/>
        </electricalProjection>
        <electricalProjection id="NC_DB1_AVBR_Generic_GJ" presynapticPopulation="DB1" postsynapticPopulation="AVBR">
            <electricalConnectionInstanceW id="0" preCell="../DB1/0/GenericNeuronCell" postCell="../AVBR/0/GenericNeuronCell" synapse="DB1_to_AVBR_elec_syn" weight="1."/>
        </electricalProjection>
        <electricalProjection id="NC_VA1_AVAL_Generic_GJ" presynapticPopulation="VA1" postsynapticPopulation="AVAL">
            <electricalConnectionInstanceW id="0" preCell="../VA1/0/GenericNeuronCell" postCell="../AVAL/0/GenericNeuronCell" synapse="VA1_to_AVAL_elec_syn" weight="1."/>
        </electricalProjection>
        <electricalProjection id="NC_VA1_AVAR_Generic_GJ" presynapticPopulation="VA1" postsynapticPopulation="AVAR">
            <electricalConnectionInstanceW id="0" preCell="../VA1/0/GenericNeuronCell" postCell="../AVAR/0/GenericNeuronCell" synapse="VA1_to_AVAR_elec_syn" weight="1."/>
        </electricalProjection>
        <electricalProjection id="NC_VB1_AVBL_Generic_GJ" presynapticPopulation="VB1" postsynapticPopulation="AVBL">
            <electricalConnectionInstanceW id="0" preCell="../VB1/0/GenericNeuronCell" postCell="../AVBL/0/GenericNeuronCell" synapse="VB1_to_AVBL_elec_syn" weight="1."/>
        </electricalProjection>
        <continuousProjection id="NC_AVAL_AVAR_Acetylcholine" presynapticPopulation="AVAL" postsynapticPopulation="AVAR">
            <continuousConnectionInstanceW id="0" preCell="../AVAL/0/GenericNeuronCell" postCell="../AVAR/0/GenericNeuronCell" preComponent="silent" postComponent="neuron_to_neuron_exc_syn" weight="1."/>
        </continuousProjection>
        <continuousProjection id="NC_AVAL_DA1_Acetylcholine" presynapticPopulation="AVAL" postsynapticPopulation="DA1">
            <continuousConnectionInstanceW id="0" preCell="../AVAL/0/GenericNeuronCell" postCell="../DA1/0/GenericNeuronCell" preComponent="silent" postComponent="neuron_to_neuron_exc_syn" weight="1."/>
        </continuousProjection>
        <continuousProjection id="NC_AVAL_VA1_Acetylcholine" presynapticPopulation="AVAL" postsynapticPopulation="VA1">
            <continuousConnectionInstanceW id="0" preCell="../AVAL/0/GenericNeuronCell" postCell="../VA1/0/GenericNeuronCell" preComponent="silent" postComponent="neuron_to_neuron_exc_syn" weight="1."/>
        </continuousProjection>
        <continuousProjection id="NC_AVAR_AVAL_Acetylcholine" presynapticPopulation="AVAR" postsynapticPopulation="AVAL">
            <continuousConnectionInstanceW id="0" preCell="../AVAR/0/GenericNeuronCell" postCell="../AVAL/0/GenericNeuronCell" preComponent="silent" postComponent="neuron_to_neuron_exc_syn" weight="1."/>
        </continuousProjection>
        <continuousProjection id="NC_AVAR_DA1_Acetylcholine" presynapticPopulation="AVAR" postsynapticPopulation="DA1">
            <continuousConnectionInstanceW id="0" preCell="../AVAR/0/GenericNeuronCell" postCell="../DA1/0/GenericNeuronCell" preComponent="silent" postComponent="neuron_to_neuron_exc_syn" weight="1."/>
        </continuousProjection>
        <continuousProjection id="NC_AVAR_AS1_Acetylcholine" presynapticPopulation="AVAR" postsynapticPopulation="AS1">
            <continuousConnectionInstanceW id="0" preCell="../AVAR/0/GenericNeuronCell" postCell="../AS1/0/GenericNeuronCell" preComponent="silent" postComponent="neuron_to_neuron_exc_syn" weight="1."/>
        </continuousProjection>
        <continuousProjection id="NC_AVBL_AVBR_Acetylcholine" presynapticPopulation="AVBL" postsynapticPopulation="AVBR">
            <continuousConnectionInstanceW id="0" preCell="../AVBL/0/GenericNeuronCell" postCell="../AVBR/0/GenericNeuronCell" preComponent="silent" postComponent="neuron_to_neuron_exc_syn" weight="1."/>
        </continuousProjection>
        <continuousProjection id="NC_AVBR_AVBL_Acetylcholine" presynapticPopulation="AVBR" postsynapticPopulation="AVBL">
            <continuousConnectionInstanceW id="0" preCell="../AVBR/0/GenericNeuronCell" postCell="../AVBL/0/GenericNeuronCell" preComponent="silent" postComponent="neuron_to_neuron_exc_syn" weight="1."/>
        </continuousProjection>
        <continuousProjection id="NC_AVBR_AS1_Acetylcholine" presynapticPopulation="AVBR" postsynapticPopulation="AS1">
            <continuousConnectionInstanceW id="0" preCell="../AVBR/0/GenericNeuronCell" postCell="../AS1/0/GenericNeuronCell" preComponent="silent" postComponent="neuron_to_neuron_exc_syn" weight="1."/>
        </continuousProjection>
        <continuousProjection id="NC_DA1_AS1_Acetylcholine" presynapticPopulation="DA1" postsynapticPopulation="AS1">
            <continuousConnectionInstanceW id="0" preCell="../DA1/0/GenericNeuronCell" postCell="../AS1/0/GenericNeuronCell" preComponent="silent" postComponent="neuron_to_neuron_exc_syn" weight="1."/>
        </continuousProjection>
        <continuousProjection id="NC_DA1_DD1_Acetylcholine" presynapticPopulation="DA1" postsynapticPopulation="DD1">
            <continuousConnectionInstanceW id="0" preCell="../DA1/0/GenericNeuronCell" postCell="../DD1/0/GenericNeuronCell" preComponent="silent" postComponent="neuron_to_neuron_exc_syn" weight="1."/>
        </continuousProjection>
        <continuousProjection id="NC_DB1_AS1_Acetylcholine" presynapticPopulation="DB1" postsynapticPopulation="AS1">
            <continuousConnectionInstanceW id="0" preCell="../DB1/0/GenericNeuronCell" postCell="../AS1/0/GenericNeuronCell" preComponent="silent" postComponent="neuron_to_neuron_inh_syn" weight="1."/>
        </continuousProjection>
        <continuousProjection id="NC_DB1_DD1_Acetylcholine" presynapticPopulation="DB1" postsynapticPopulation="DD1">
            <continuousConnectionInstanceW id="0" preCell="../DB1/0/GenericNeuronCell" postCell="../DD1/0/GenericNeuronCell" preComponent="silent" postComponent="neuron_to_neuron_exc_syn" weight="1."/>
        </continuousProjection>
        <continuousProjection id="NC_AS1_DA1_Acetylcholine" presynapticPopulation="AS1" postsynapticPopulation="DA1">
            <continuousConnectionInstanceW id="0" preCell="../AS1/0/GenericNeuronCell" postCell="../DA1/0/GenericNeuronCell" preComponent="silent" postComponent="neuron_to_neuron_exc_syn" weight="1."/>
        </continuousProjection>
        <continuousProjection id="NC_AS1_DB1_Acetylcholine" presynapticPopulation="AS1" postsynapticPopulation="DB1">
            <continuousConnectionInstanceW id="0" preCell="../AS1/0/GenericNeuronCell" postCell="../DB1/0/GenericNeuronCell" preComponent="silent" postComponent="neuron_to_neuron_exc_syn" weight="1."/>
        </continuousProjection>
        <continuousProjection id="NC_AS1_AS1_Acetylcholine" presynapticPopulation="AS1" postsynapticPopulation="AS1">
            <continuousConnectionInstanceW id="0" preCell="../AS1/0/GenericNeuronCell" postCell="../AS1/0/GenericNeuronCell" preComponent="silent" postComponent="neuron_to_neuron_exc_syn" weight="1."/>
        </continuousProjection>
        <continuousProjection id="NC_AS1_DD1_Acetylcholine" presynapticPopulation="AS1" postsynapticPopulation="DD1">
            <continuousConnectionInstanceW id="0" preCell="../AS1/0/GenericNeuronCell" postCell="../DD1/0/GenericNeuronCell" preComponent="silent" postComponent="neuron_to_neuron_exc_syn" weight="1."/>
        </continuousProjection>
        <continuousProjection id="NC_AS1_VD1_Acetylcholine" presynapticPopulation="AS1" postsynapticPopulation="VD1">
            <continuousConnectionInstanceW id="0" preCell="../AS1/0/GenericNeuronCell" postCell="../VD1/0/GenericNeuronCell" preComponent="silent" postComponent="neuron_to_neuron_inh_syn" weight="1."/>
        </continuousProjection>
        <continuousProjection id="NC_VA1_DD1_Acetylcholine" presynapticPopulation="VA1" postsynapticPopulation="DD1">
            <continuousConnectionInstanceW id="0" preCell="../VA1/0/GenericNeuronCell" postCell="../DD1/0/GenericNeuronCell" preComponent="silent" postComponent="neuron_to_neuron_exc_syn" weight="1."/>
        </continuousProjection>
        <continuousProjection id="NC_VA1_VD1_Acetylcholine" presynapticPopulation="VA1" postsynapticPopulation="VD1">
            <continuousConnectionInstanceW id="0" preCell="../VA1/0/GenericNeuronCell" postCell="../VD1/0/GenericNeuronCell" preComponent="silent" postComponent="neuron_to_neuron_inh_syn" weight="1."/>
        </continuousProjection>
        <continuousProjection id="NC_VB1_DD1_Acetylcholine" presynapticPopulation="VB1" postsynapticPopulation="DD1">
            <continuousConnectionInstanceW id="0" preCell="../VB1/0/GenericNeuronCell" postCell="../DD1/0/GenericNeuronCell" preComponent="silent" postComponent="neuron_to_neuron_exc_syn" weight="1."/>
        </continuousProjection>
        <continuousProjection id="NC_VB1_VD1_Acetylcholine" presynapticPopulation="VB1" postsynapticPopulation="VD1">
            <continuousConnectionInstanceW id="0" preCell="../VB1/0/GenericNeuronCell" postCell="../VD1/0/GenericNeuronCell" preComponent="silent" postComponent="neuron_to_neuron_exc_syn" weight="1."/>
        </continuousProjection>
        <continuousProjection id="NC_VD1_DD1_GABA" presynapticPopulation="VD1" postsynapticPopulation="DD1">
            <continuousConnectionInstanceW id="0" preCell="../VD1/0/GenericNeuronCell" postCell="../DD1/0/GenericNeuronCell" preComponent="silent" postComponent="neuron_to_neuron_inh_syn" weight="1."/>
        </continuousProjection>
        <continuousProjection id="NC_VD1_VA1_GABA" presynapticPopulation="VD1" postsynapticPopulation="VA1">
            <continuousConnectionInstanceW id="0" preCell="../VD1/0/GenericNeuronCell" postCell="../VA1/0/GenericNeuronCell" preComponent="silent" postComponent="neuron_to_neuron_inh_syn" weight="1."/>
        </continuousProjection>
        <continuousProjection id="NC_VD1_VB1_GABA" presynapticPopulation="VD1" postsynapticPopulation="VB1">
            <continuousConnectionInstanceW id="0" preCell="../VD1/0/GenericNeuronCell" postCell="../VB1/0/GenericNeuronCell" preComponent="silent" postComponent="neuron_to_neuron_inh_syn" weight="1."/>
        </continuousProjection>
        <inputList id="Input_AVBL_stim_AVBL_1" population="AVBL" component="stim_AVBL_1">
            <input id="0" target="../AVBL/0/GenericNeuronCell" destination="synapses"/>
        </inputList>
        <inputList id="Input_AVBR_stim_AVBR_1" population="AVBR" component="stim_AVBR_1">
            <input id="0" target="../AVBR/0/GenericNeuronCell" destination="synapses"/>
        </inputList>
        <inputList id="Input_AVAL_stim_AVAL_1" population="AVAL" component="stim_AVAL_1">
            <input id="0" target="../AVAL/0/GenericNeuronCell" destination="synapses"/>
        </inputList>
        <inputList id="Input_AVAR_stim_AVAR_1" population="AVAR" component="stim_AVAR_1">
            <input id="0" target="../AVAR/0/GenericNeuronCell" destination="synapses"/>
        </inputList>
        <inputList id="Input_AVBL_stim_AVBL_2" population="AVBL" component="stim_AVBL_2">
            <input id="0" target="../AVBL/0/GenericNeuronCell" destination="synapses"/>
        </inputList>
        <inputList id="Input_AVBR_stim_AVBR_2" population="AVBR" component="stim_AVBR_2">
            <input id="0" target="../AVBR/0/GenericNeuronCell" destination="synapses"/>
        </inputList>
        <inputList id="Input_DB1_stim_DB1_1" population="DB1" component="stim_DB1_1">
            <input id="0" target="../DB1/0/GenericNeuronCell" destination="synapses"/>
        </inputList>
        <inputList id="Input_VB1_stim_VB1_1" population="VB1" component="stim_VB1_1">
            <input id="0" target="../VB1/0/GenericNeuronCell" destination="synapses"/>
        </inputList>
        <inputList id="Input_DA1_stim_DA1_1" population="DA1" component="stim_DA1_1">
            <input id="0" target="../DA1/0/GenericNeuronCell" destination="synapses"/>
        </inputList>
        <inputList id="Input_VA1_stim_VA1_1" population="VA1" component="stim_VA1_1">
            <input id="0" target="../VA1/0/GenericNeuronCell" destination="synapses"/>
        </inputList>
    </network>
</neuroml>
